!solve
FINISH
/SOLU
ALLSEL,ALL
antype,0	!静力分析
TIME,5

OUTRES,erase
OUTRES,ALL,ALL
outpr,all,all  !输出.output

SOLCONTROL,ON
NSUBST,20,100,5
autots,on	!自动时间步
lnsrch,on !打开线性搜索
cnvtol,U	!使用位移收敛准则
!cnvtol,F	!使用力收敛准则

allsel,all
cmsel,s,cm_4_loadnotes1
cmsel,a,cm_5_loadnotes2
f,all,fy,-2500/6*25	! change load of load step i
allsel,all

SOLVE
