!solve
FINISH
/SOLU
ALLSEL,ALL
antype,0	!静力分析
TIME,5
NSUBST,20,100,5

OUTRES,erase
OUTRES,ALL,ALL
outpr,all,all  !输出.output

autots,on	!自动时间步


arclen,on !打开弧长法
!lnsrch,on !打开线性搜索
!cnvtol,U	!使用位移收敛准则
!cnvtol,F	!使用力收敛准则

SOLVE


outpr,all,all  !输出.output
