!solve
FINISH
/SOLU
ALLSEL,ALL
antype,0	!静力分析
!TIME,10

OUTRES,erase
OUTRES,ALL,ALL
outpr,all,all  !输出.output

SOLCONTROL,ON
NSUBST,20,100,5
autots,on	!自动时间步
lnsrch,on !打开线性搜索
cnvtol,U	!使用位移收敛准则
!cnvtol,F	!使用力收敛准则

!SOLVE

/solu
! *do, i, 1, 20	! load displacement from -5 to -100
	time, 10*1-5	! load step i at time 10*i, 5,15,,,,

	! load Fy
	allsel,all
	cmsel,s,cm_4_loadnotes1
	cmsel,a,cm_5_loadnotes2
	f,all,fy,-10*1000/2/6*(19-1)	! change load of load step i; if i=1, then f=0;
	allsel,all
	solve

	time, 10*1 	! 10,20,...
	! load displacement
	allsel,all
	CMSEL,S,CM_16_NOTESOFMIDBEAM	! select nodes at mid beam
	CMSEL,A,CM_17_NODESOFSTEELMIDBEAM
	D,all,uy,uy(1837)-5*1	! apply displacement
	allsel,all
	solve
! *enddo
